// COMSOL Multiphysics 4.4.0.195 model "Electrode_axisymmetric_ch1.mph"
// Outline of the model tree

Geometry
  geom1 "Geometry 1" (2D axisymmetric, length unit mm)
    r1: Rectangle | pos = {0, 0}; type = solid; base = corner; size = {2.5, 2}
    c1: Circle | r = 40
    b1: BezierPolygon "Bézier Polygon 1" | p = {{0, 0}, {-42, 42}}; degree = 1; w = {1, 1}; type = solid
    uni1: Union | input = b1, c1
    del1: Delete "Delete Entities 1" | input = uni1(1) domains 1
    dif1: Difference | input = del1; input2 = r1
    b2: BezierPolygon "Bézier Polygon 2" | p = {{0, 25}, {-11, -11}}; degree = 1; w = {1, 1}; type = solid
    fin: Finalize "Form Union"

Physics
  ec: ConductiveMedia "Electric Currents" on all domains
    dependent variable V
    ShapeProperty.order_electricpotential = 3
    cucn1: CurrentConservation (default) | sigma_mat = userdef; sigma = .2; epsilonr_mat = userdef; epsilonr = 1
    axi1: AxialSymmetry (default)
    ein1: ElectricInsulation (default)
    init1: init "Initial Values 1" (default)
    fp1: FloatingPotential on boundaries 5, 7, 9 | I0 = 10e-3
    gnd1: Ground on boundaries 10, 11

Mesh
  mesh1 "Mesh 1"
    size: MeshSizeDefault | hmax = 5.63; hmin = 0.0252; hcurve = 0.3; hnarrow = 1; hgrad = 1.3; hauto = 5
    edg1: Edge on boundaries 4
      size1: Size on boundaries 4 | hmax = 0.3; hmin = 0.0001; hauto = 1; custom = on
    ftri1: FreeTri "Free Triangular 1" on remaining entities
      size1: Size on entire geometry | hauto = 2

Studies
  std1 "Study 1"
    stat: Stationary

Solver configurations
  sol1 "Solver 1" (study std1)
    v1: Variables "Dependent Variables 1"
    s1: Stationary "Stationary Solver 1"
      dDef: Direct
      fc1: FullyCoupled | linsolver = dDef

Datasets
  dset1: Solution | solution = sol1
  rev1: Revolve2D "Revolution 2D 1" | data = dset1; genpoints = {{0, 0}, {0, 1}}
  cpl1: CutPlane | data = rev1; quickplane = xy; quickz = -11; genpoints = {{0, 0, 0}, {1, 0, 0}, {0, 1, 0}}

Plots
  pg1: PlotGroup2D "Electric Potential (ec)" | data = dset1
    surf1: Surface | expr = V
  pg2: PlotGroup3D "Electric Potential (ec) 1" | data = rev1
    surf1: Surface | expr = V
  pg3: PlotGroup2D "2D Plot Group 3" | data = cpl1
    surf1: Surface (disabled) | expr = ec.normE
    con1: Contour | expr = ec.normE; levelmethod = levels; levels = range(1554.6,259.1,2591)
    surf2: Surface | expr = ec.normE
      hght1: Height "Height Expression 1" | expr = V